t := 0, 1 .. 249
v_i(t) := 0.1 V*sin(2*π*t/125) + 0 V
# [area: analog :]
Vcc := 3.3 V
R_1 := 47 kΩ
R_2 := 10 kΩ
R_3 := 2.2 kΩ
R_4 := 2.2 kΩ
v_p := Vcc*R_4/(R_4 + R_3)
v_p = 1.65 V
limit_value(value, minimum, maximum) :=
    minimum if value < minimum
    maximum if value > maximum
    value otherwise
v_opamp(v_n) == v_p*(1 + R_2/R_1) - v_n(R_2/R_1)
v_n(t) := v_p + v_i(t)
v_opamp(t) := limit_value(v_p*(1 + R_2/R_1) - v_n(t)*(R_2/R_1), 0, Vcc)
volt_per_div := [
    "10mV", 0.01;
    "20mV", 0.02;
    "50mV", 0.05;
    "100mV", 0.1;
    "200mV", 0.2;
    "500mV", 0.5;
    "1V", 1;
    "2V", 2;
    "GND", 2^16
]
# [area: discrete :]
V_ref := Vcc
bits := 10
shift(integer, position) :=
    out ← integer*2^position
    trunc(out)
v_adc(in) :=
    1*(2^bits - 1) if in > V_ref
    0 if in ≤ 0
    trunc((in/V_ref)*(2^bits - 1)) otherwise
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data_max := 240
position := 20*6
scale1 := 2
# [area: process samples :]
gain1 := trunc(6.2*1/volt_per_div[scale1, 1])
gain1 = 124
data[t] := limit_value(shift(v_adc(v_opamp(t)), -2), 0, data_max)
res := 31
offset1 := 511
temp1[t] := trunc(shift(position, bits)/data_max)
temp2[t] := limit_value(offset1 + temp1[t] - v_adc(v_opamp(t)), -(2^res), 2^res)
temp3[t] := limit_value(temp2[t]*data_max*gain1, -(2^res), 2^res)
data2[t] := trunc(temp2[t]*(data_max/2^bits)*gain1/4 + ((position*4 - position*gain1)/4))
temp4[t] := trunc(shift(temp3[t], -bits) + shift(position, 2) - (position*gain1))
temp5[t] := shift(temp4[t], -2)
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plot_data[t] := limit_value(temp5[t], 0, data_max)
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volt_per_div[scale1, 0] = "50mV"
